# Define temperatures for the loop using 'index'
variable t index 100 200 300 400 500 600 700

label temp_loop

units           metal
dimension       3
boundary        p p p
atom_style      atomic

neighbor        2.5 bin
neigh_modify delay 0

timestep        0.002

read_data       Bi2Te3552.Data

pair_style      deepmd frozen_model.pb
pair_coeff      * *


# Region and Group Definitions
region left block INF INF INF INF INF 3 units box
group left region left
region right block INF INF INF INF 57 INF units box
group right region right
group boundary union left right
group mobile subtract all boundary

# Minimization
min_style       cg
minimize        1e-10 1e-10 5000 5000


# Set temperature
variable T equal ${t}

# Velocity Initialization
velocity mobile create ${T} 53434 dist gaussian units box
velocity left set 0.0 0.0 0.0 units box
velocity right set 0.0 0.0 0.0 units box

# Stress and Strain Calculations
compute 1 all centroid/stress/atom NULL
compute zz_stress all reduce sum c_1[3]

variable CorVol equal ly*lx*3.35
variable sigmazz equal c_zz_stress/(v_CorVol*10000)

variable l_z equal lz
variable lz0 equal ${l_z}  # Initialize with the initial box length in z
variable strain equal (v_lz0-lz)/v_lz0  # Strain calculation for compression
variable stress equal v_sigmazz

# Boundary Fixes
fix 1 boundary setforce 0 0 0
fix 2 all npt temp ${T} ${T} 0.01 iso 0 0 0.1

# Output Configuration
thermo 1000
thermo_modify lost ignore
dump 1 all atom 1000 relax_${T}K.lammpstrj
run 3000

unfix 2
undump 1
reset_timestep 0

# Stress-Strain Output
fix output all print 100 "${strain},${stress}" file stress_strain_${T}K.csv screen no title "Strain,Stress"
thermo_style custom step press v_strain v_sigmazz temp lx ly lz vol
thermo 100

fix 2 all npt temp ${T} ${T} 0.01 x 0 0 0.1 y 0 0 0.1
fix 3 all deform 200 z erate -0.005 remap x  # Compression by shrinking in z direction
dump 1 all atom 500 algp_${T}K.lammpstrj
run 30000
undump 1

# Clean up compute and prepare for the next loop
uncompute 1
uncompute zz_stress
unfix 1
unfix 2
unfix 3

# Loop to the next temperature
clear
next t
jump SELF temp_loop
